A := transpose([7, 0, 0, 1])
B := transpose([0, -10, 0, 1])
C := transpose([0, 0, 20, 1])
TR := augment(A, B, C)
TR = [7, 0, 0; 0, -10, 0; 0, 0, 20; 1, 1, 1]
r_v := 10
φ_vg := 135
φ_v := φ_vg*π/180
Θ_vg := 45
Θ_v := Θ_vg*π/180
X_LW := 100
Y_LW := 50
X_HW := 500
Y_HW := 350
# Матрица пересчета из МСК в видовую
K_SE := [
    -sin(φ_v), cos(φ_v), 0, 0;
    -cos(Θ_v)*cos(φ_v), -cos(Θ_v)*sin(φ_v), sin(Θ_v), 0;
    -sin(Θ_v)*cos(φ_v), -sin(Θ_v)*sin(φ_v), -cos(Θ_v), r_v;
    0, 0, 0, 1
]
# Координаты треугольника в видовой ск
TRE := K_SE*TR
TRE = [-4.94975, 7.07107, 0; 3.5, 5, 14.1421; 13.5, 15, -4.14214; 1, 1, 1]
XV := transpose(TRE)[:, 0]
YV := transpose(TRE)[:, 1]
ZV := transpose(TRE)[:, 2]
IV := transpose(TRE)[:, 3]
# Матрица из проекций вершин пирамиды на картинную плоскость
P_xy := stack(transpose(XV), transpose(YV), transpose(IV))
P_xy = [-4.94975, 7.07107, 0; 3.5, 5, 14.1421; 1, 1, 1]
# Определяем габариты области проекции
X_L := min(XV)
Y_H := max(YV)
ЛВ
X_L = -4.94975
Y_H = 14.1421
X_H := max(XV)
Y_L := min(YV)  # ПН
X_H = 7.07107
Y_L = 3.5
ΔX_W := X_HW - X_LW
ΔX_W = 400
ΔX := X_H - X_L
ΔX = 12.0208
ΔY_W := Y_HW - Y_LW
ΔY_W = 300
ΔY := Y_H - Y_L
ΔY = 10.6421
K_X := ΔX_W/ΔX
K_X = 33.2756
K_Y := ΔY_W/ΔY
K_Y = 28.1898
# Матрица пересчета из МСК в оконную СК
T_SW := [K_X, 0, X_LW - K_X*X_L; 0, -K_Y, Y_HW + K_Y*Y_L; 0, 0, 1]
# Вычисляем оконные координаты
TRX := T_SW*P_xy
TRW := vectorize(round(TRX))
[x_a, x_b, x_c; y_a, y_b, y_c; q, q, q] := TRW
X := [x_a, x_b, x_c, x_a]
X = [100, 500, 265, 100]
Y := -[y_a, y_b, y_c, y_a]
Y = [-350, -308, -50, -350]
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