A := transpose([5, 0, 0, 1])
B := transpose([0, 0, 0, 1])
C := transpose([0, 5, 0, 1])
D := transpose([0, 0, 10, 1])
PIR := augment(A, B, C, D)
PIR = [5, 0, 0, 0; 0, 0, 5, 0; 0, 0, 0, 10; 1, 1, 1, 1]
r_v := 10
φ_vg := 20
φ_v := φ_vg*π/180
Θ_vg := 45
Θ_v := Θ_vg*π/180
X_LW := 100
Y_LW := 200
X_HW := 800
Y_HW := 900
# Матрица пересчета из МСК в видовую
K_view := [
    -sin(φ_v), cos(φ_v), 0, 0;
    -cos(Θ_v)*cos(φ_v), -cos(Θ_v)*sin(φ_v), sin(Θ_v), 0;
    -sin(Θ_v)*cos(φ_v), -sin(Θ_v)*sin(φ_v), -cos(Θ_v), r_v;
    0, 0, 0, 1
]
# Координаты треугольника в видовой ск
PIR_V := K_view*PIR
PIR_V = [-1.7101, 0, 4.69846, 0; -3.32232, 0, -1.20922, 7.07107; 6.67768, 10, 8.79078, 2.92893; 1, 1, 1, 1]
XV := transpose(PIR_V)[:, 0]
YV := transpose(PIR_V)[:, 1]
ZV := transpose(PIR_V)[:, 2]
IV := transpose(PIR_V)[:, 3]
# Матрица из проекций вершин пирамиды на картинную плоскость
P_XY := stack(transpose(XV), transpose(YV), transpose(IV))
P_XY = [-1.7101, 0, 4.69846, 0; -3.32232, 0, -1.20922, 7.07107; 1, 1, 1, 1]
# Определяем габариты области проекции
X_L := min(XV)
Y_H := max(YV)
ЛВ
X_L = -1.7101
Y_H = 7.07107
X_H := max(XV)
Y_L := min(YV)  # ПН
X_H = 4.69846
Y_L = -3.32232
ΔX_W := X_HW - X_LW
ΔX_W = 700
ΔX := X_H - X_L
ΔX = 6.40856
ΔY_W := Y_HW - Y_LW
ΔY_W = 700
ΔY := Y_H - Y_L
ΔY = 10.3934
K_X := ΔX_W/ΔX
K_X = 109.229
K_Y := ΔY_W/ΔY
K_Y = 67.3505
# Матрица пересчета из МСК в оконную СК
T_SW := [K_X, 0, X_LW - K_X*X_L; 0, -K_Y, Y_HW + K_Y*Y_L; 0, 0, 1]
# Вычисляем оконные координаты
M1w := T_SW*P_XY
Mw := vectorize(round(M1w))
[x_a, x_b, x_c, x_d; y_a, y_b, y_c, y_d; q, q, q, q] := Mw
R_C := [r_v*sin(Θ_v)*cos(φ_v); r_v*sin(Θ_v)*sin(φ_v); r_v*cos(Θ_v)]
AC := [C[0]; C[1]; C[2]] - [A[0]; A[1]; A[2]]
AD := [D[0]; D[1]; D[2]] - [A[0]; A[1]; A[2]]
N_ADC := AC×AD
N_ADB := transpose([0, -1, 0])
N_BDC := transpose([-1, 0, 0])
N_ABC := transpose([0, 0, -1])
q1 := R_C*N_ADC
s1 := if(q1 ≥ 0, "ADC видна", "ADC не видна")
s1 = "ADC видна"
q2 := R_C*N_ADB
s2 := if(q2 ≥ 0, "ADB видна", "ADB не видна")
s2 = "ADB не видна"
q3 := R_C*N_BDC
s3 := if(q3 ≥ 0, "BDC видна", "BDC не видна")
s3 = "BDC не видна"
q1 := R_C*N_ABC
s1 := if(q1 ≥ 0, "ABC видна", "ABC не видна")
s1 = "ABC не видна"
X := [x_a, x_b, x_c, x_a, x_d, x_b, x_d, x_c]
Y := -[y_a, y_b, y_c, y_a, y_d, y_b, y_d, y_c]
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